# Para la obtención de los valores de los componentes del circuito, se tomarán en consideración las siguientes especificaciones
# Se tomó en cuenta el siguiente circuito para el análisis de componentes.
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# Especificaciones:
# switches a usar: MOSFET
fc := 60000  # [Hz]
P := 5  # [W]
# Caso 1: Modo Buck
V_inBuck := 23  # [V]
V_oBuck := 14  # [V]
# Caso 2: Modo Boost
V_inBoost := 12  # [V]
V_oBoost := 27  # [V]
# Primero se comenzará con el análisis del convertidor en Modo Buck, teniendo en cuenta las siguientes suposiciones para un cálculo claro.
# Tomando en cuenta la siguiente disposición del circuito
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# - El circuito opera en régimen permanente
# - La corriente en el inductor es siempre positiva.
# - El valor del capacitor(C3) es muy grande y la tensión de salida se mantiene constante a una tensión Vo.
# - El periodo de conmutación es T. El interruptor estará cerrado un tiempo DT y estará abierto un tiempo (1 — D)T.
# - Los componentes son ideales.
# Se comenzará tomando el caso cuando el MOSFET 1 actúa como un switch cerrado y el MOSFET 2 como un switch abierto.
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# MOSFET 1 cerrado
# Para el voltaje en el inductor se tiene:
V_L := (V_inBuck - V_oBuck) = 9
# Por definición se tiene de igual manera:
V_L(t) == L*d/dt(i_L(t))
# Como la derivada de la corriente es una constante positiva, la corriente aumenta linealmente
# Forma de onda de voltaje de inductor y corriente del inductor
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# Con :
Δt == DT
Δi_L/Δt == Δi_L/DT == (V_inBuck - V_oBuck)/L
# Teniendo la variación de la corriente del inductor cuando el MOSFET 1 está cerrado como:
Δi_L_close := (V_inBuck - V_oBuck)/L*DT  # error: Esta variable no está definida. Compruebe que el rótulo esté definido correctamente.
# Para el otro caso se obtendrá cuando el MOSFET 1 actúa como un switch abierto y el MOSFET 2 como un switch cerrado.
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# MOSFET 1 abierto
# Cuando el switch está abierto el voltaje en el inductor pasa a ser el valor inverso de la salida de la carga.
V_L := -V_oBuck == L*d/dt(i_L)  # error: Esta variable no está definida. Compruebe que el rótulo esté definido correctamente.
# Despejando la derivada de la corriente tenemos que:
d/dt(i_L) == -V_oBuck/L
# La derivada de la corriente en el inductor es una constante negativa y la corriente disminuye linealmente, como se puede apreciar en las formas de onda de corriente. Teniendo la variación de la corriente del inductor cuando el switch está abierto como:
Δi_L/Δt == Δi_L/((1 - D)*T) == -V_oBuck/L
# Despejando Δi_L:
Δi_L_open := -(1 - D)*T*V_oBuck/L  # error: Esta variable no está definida. Compruebe que el rótulo esté definido correctamente.
# En estado estacionario se requiere que la corriente en el inductor sea la misma al final que en el inicio, por lo que su variación neta en un periodo será cero.
Δi_L_open + Δi_L_close == 0
# Remplazando cada variación de corriente se obtiene:
(D - 1)*T*V_oBuck/L + (V_inBuck - V_oBuck)/L*DT == 0
# Teniendo un ciclo de trabajo para el Modo Buck como:
D_Buck := V_oBuck/V_inBuck = 0.608696
# Se puede observar que si el voltaje de entrada varía, el voltaje de salida se puede ajustar con una adecuación del ciclo de trabajo.
# Para obtener el valor de la carga se realiza un calculo con la potencia máxima permitida en la carga, teniendo el siguiente cálculo.
R := V_oBuck^2/P = 39.2  # Ω  # Considerando un caso ideal en donde la potencia de entrada es igual a la de salida
# Ahora, para saber cual es la corriente máxima que puede aceptar el inductor y la corriente mínima para entrar en conducción continua. La corriente media en la bobina debe ser igual a la corriente media en la resistencia de carga(corriente nula en el condensador en régimen permanente).
i_R := V_oBuck/R
i_L := i_R
# Se tomará en cuenta el siguiente gráfico de la corriente para una mayor facilidad de calculo
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# Suponiendo que se genera un triangulo perfecto entre la corriente de la resistencia y la corriente máxima
# Por lo tanto la corriente máxima del inductor será
i_Lmax == i_L + Δi_L_open/2
# Remplazando por las corrientes correspondientes queda como.
i_Lmax == V_oBuck/R + (D - 1)*T*V_oBuck/(2*L)
# Por otro lado se tiene la corriente mínima como:
i_Lmin == i_L - Δi_L_open/2
# Remplazando se obtiene:
i_Lmin == V_oBuck/R + (1 - D)*T*V_oBuck/(2*L)
# Para que el análisis anterior sea valido se debe verificar que exista corriente permanente el inductor. esto se cumple cuando la corriente mínima en el inductor sea cero, ya que es el limite entre corriente permanente y discontinua.
# Entonces con la corriente mínima nula se obtiene que:
i_Lmin == V_oBuck/R + (1 - D)*T*V_oBuck/(2*L) == 0
# Con este cálculo se puede obtener la inductancia mínima aceptable para que funcione en corriente permanente
L_min == (1 - D)*R/(2*f_c)
# Al tener un mínimo para el valor de inductancia, se puede analizar el caso de la inductancia con un ripple de corriente dado como:
Δi_L/DT == (V_inBuck - V_oBuck)/L
# Despejando la inductancia se obtiene como:
L == (V_inBuck - V_oBuck)*DT/Δi_L
# Para el cálculo del capacitor se tomará en cuenta la definición de capacidad junto con el gráfico siguiente.
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# Desarrollando el triangulo se tiene:
ΔQ == 1/2*(T/2)*(Δi_L_open/2)
# Y por definición se tiene:
ΔQ == CΔV_oBuck
# Igualando ambas expresiones se obtiene que el condensador para el Modo Buck es:
C == TΔi_L_open/(8*ΔV_oBuck)
# Remplazando el valor de la corriente:
C == T^2*(1 - D)*V_oBuck/(8*LΔV_oBuck) == (1 - D_Buck)*V_oBuck/(8*f_c^2*L*ΔV_oBuck)
# Una vez obtenidos todos los cálculos de los componentes y corrientes, se tomarán en cuenta las siguientes consideraciones.
# Se usarán rizzados de un 1% para el voltaje de salida y de un 30% para la corriente.
# Se usa un 1% en el voltaje de salida porque evita usar capacitores gigantes y balance entre calidad de la fuente y tamaño/costo de los capacitores. En cambio, para la corriente, se usa un 30% porque el inductor no queda ni demasiado grande ni demasiado chico y se mantiene operación en CCM (Continuous Conduction Mode) con un diseño razonable.
ΔV_oBuck := 0.01*V_oBuck = 0.14
D_Buck := V_oBuck/V_inBuck
R = 39.2
V_oBuck := 14
Δi_L := 0.3*P/V_oBuck = 0.107143
f_c := 60000
V_inBuck := 23
# Con estos valores se tienen los siguientes componentes y corrientes a considerar
# Para la inductancia se tomará en cuenta el siguiente cálculo:
L := (V_inBuck - V_oBuck)*D_Buck/(f_c*Δi_L) = 0.000852174
# El calculo de la inductancia mínima no se tomará en cuenta para el diseño, pero si para el cálculo, ya que está entre el limite de la discontinuidad con:
L_min := (1 - D_Buck)*R/(2*f_c) = 0.000127826
# Eligiendo de esta forma el valor de inductancia de (8.522*10^-4)*H
# Para la capacitancia se tiene el siguiente valor:
C := (1 - D_Buck)*V_oBuck/(8*(f_c^2*L)*ΔV_oBuck) = 1.59439e-6  # F
# Al tener este valor, se tendrá que escoger un capacitor cerámico de 2.2 µF, 25 V que acepte el voltaje de salida.
# Para las corrientes aceptables en el inductor se tienen:
i_LmaxAVG := P/V_oBuck = 0.357143
i_Lmax := V_oBuck/R + (1 - D_Buck)*V_oBuck/(2*L*f_c) = 0.410714
i_Lmin := V_oBuck/R - (1 - D_Buck)*V_oBuck/(2*L*f_c) = 0.303571
Δi_L_open := (1 - D_Buck)*V_oBuck/(L*f_c) = 0.107143
# Para el análisis del Modo Boost también se tomarán las mismas suposiciones mencionadas previamente para el  Modo Buck para facilitar el cálculo y poder simular de manera eficiente.
# Se tomará en cuenta el siguiente circuito
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# Para comenzar el análisis se abarcará la tensión y la corriente en el inductor con el MOSFET 2 comportándose como un switch cerrado y el MOSFET 1 como un switch abierto
# Al tener solo el MOSFET 2 cerrado, se genera una malla sin tomar en cuenta a la carga, ya que el MOSFET 1 se encuentra como un circuito abierto. Por lo que por ley de Kirchoff se tiene que el voltaje en el inductor es:
V_L == V_inBoost == L*(d/dt(i_L))
# Malla para el caso del MOSFET 2 cerrado
# Teniendo en cuenta la variación de la corriente en el tiempo  como:
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d/dt(i_L) == V_inBoost/L
# En este caso la corriente aumenta linealmente, según el comportamiento de este mostrado a continuación.
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# Por lo que la variación de la corriente en el inductor se puede escribir como:
Δi_L/Δt == Δi_L/D_BoostT == V_inBoost/L
# Despejando la variación de la corriente en el inductor, se tiene.
Δi_L_close == V_inBoost*D_Boost/(L*f_c)
# En el caso en que el MOSFET 2 se comporte como un switch abierto y el MOSFET 1 como un switch cerrado, se tiene el siguiente valor para la tensión del inductor.
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V_L == V_inBoost - V_oBoost == L*(d/dt(i_L))
# Con la variación de la corriente como:
d/dt(i_L) == (V_inBoost - V_oBoost)/L
# Tomando en consideración el mismo comportamiento de la corriente para el caso del MOSFET 2 cerrado, se obtiene:
Δi_L/Δt == Δi_L/((1 - D_Boost)*T) == (V_inBoost - V_oBoost)/L
# Obteniendo una corriente Δi_L
Δi_L_open == (V_inBoost - V_oBoost)*(1 - D_Boost)/(L*f_c)
# Respecto a su análisis en régimen permanente, es idéntico a su contraparte en Modo Buck.
Δi_L_open + Δi_L_close == 0
# Remplazando las ecuaciones respectivas a los términos de corriente, se obtiene:
(V_inBoost - V_oBoost)*(1 - D_Boost)/(L*f_c) + V_inBoost*D_Boost/(L*f_c) == 0
# Despejando en términos del ciclo de trabajo(D_Boost) se obtiene:
V_oBoost/V_inBoost == 1/(1 - D_Boost)
# Se puede apreciar que cuando el ciclo de trabajo del MOSFET se aproxime a la unidad, la salida se hará infinita. Pero, esto solo ocurre en casos ideales, en la realidad los componentes que se ocuparán, producen pérdidas e impedirán que la salida se haga infinita.
# La corriente media en el inductor se calculará teniendo en cuenta que la potencia entregada por la fuente debe ser igual a la potencia absorbida por la resistencia de carga
# Si se tiene el voltaje de salida y la potencia absorbida por la carga, se puede obtener el valor de la carga
P_o == V_oBoost^2/R
# Igualando la potencia de entrada con la salida se puede obtener la corriente estimada que circulará por el inductor.
P_in == P_o
# Con
P_in == i_in*V_inBoost
# y
i_in == i_L
# Desarrollando se obtiene:
V_inBoost*i_L == V_oBoost^2/R == (V_inBoost/(1 - D_Boost))^2/R
# Con una corriente en el inductor como:
i_L == V_oBoost/((1 - D)^2*R)
# Para las corrientes máximas y mínimas aceptables en el inductor que realiza el mismo análisis gracias al comportamiento del inductor en corriente continua
i_Lmax == i_L + Δi_L_close/2 == V_inBoost/((1 - D)^2*R) + V_inBoost*D_Boost/(2*L*f_c)
i_Lmin == i_L - Δi_L_close/2 == V_inBoost/((1 - D)^2*R) - V_inBoost*D_Boost/(2*L*f_c)
# Al momento de calcular el valor de la inductancia, se debe tomar en cuenta que la corriente en el inductor sea permanente, requiriendo que la corriente mínima sea 0, estando en el limite de la discontinuidad.
0 == V_oBoost/((1 - D_Boost)^2*R) - (V_inBoost - V_oBoost)*(1 - D_Boost)/(L*f_c)
# Por lo tanto, la inductancia mínima para que el circuito opere de manera continua es:
L_min == D_Boost*(1 - D_Boost)^2*R/(2*f_c)
# En el caso del cálculo del capacitor se tomará en cuenta con el rizado pico a pico de la tensión de salida y a partir de la forma de onda de la corriente en el condensador
# Gráfico del comportamiento de la corriente en el capacitor en un convertidor Boost
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|ΔQ| == V_oBoost/(R*f_c)*D_Boost == C*ΔV_oBoost
# Por lo tanto el valor del condensador será
C == V_oBoost*D_Boost/(R*f_c*ΔV_oBoost)
# Además de los cálculos, se toman las mismas consideraciones que en el Modo Buck, por lo que se tienen:
D_Boost := ((V_oBoost - V_inBoost)/V_oBoost) = 0.555556
ΔV_oBoost := 0.01*V_oBoost = 0.27
Δi_L := 0.3*P/V_inBoost = 0.125
R := V_oBoost^2/P = 145.8
# Con estos valores se tienen los siguientes componentes y corrientes a considerar
# La inductancia que se tomará en cuenta en el inductor, se calculará con la siguiente expresión con el rizzado de la corriente posible para el inductor será de:
L := V_inBoost*D_Boost/(Δi_L*f_c) = 0.000888889
# También la inductancia mínima a considerar será:
L_min := D_Boost*(1 - D_Boost)^2*R/(2*f_c) = 0.000133333
# Los valores de corrientes que se deben considerar serán:
i_Lmax := V_inBoost/((1 - D_Boost)^2*R) + V_inBoost*D_Boost/(2*L*f_c) = 0.479167
i_Lmin := V_inBoost/((1 - D_Boost)^2*R) - V_inBoost*D_Boost/(2*L*f_c) = 0.354167
i_LmaxAVG := P/V_inBoost = 0.416667
Δi_L_close := V_inBoost*D_Boost/(2*L*f_c) = 0.0625
# Por otro lado, se tiene el capacitor como:
C := V_oBoost*D_Boost/(R*f_c*ΔV_oBoost) = 6.35066e-6
# Referencias:
# - Electrónica de potencia- Daniel W. Hart
# MOSFETS
# Se necesita una resistencia pulldown que asegure que el gate del MOSFET, esto es debido a las capacitancias parasitas del gate que pueden permanecer cargadas aún cuando el driver no esté activo
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# para el caso de un buck bidireccional:
#
# *HIGH MOS ->Rpd ->source
# *LOW MOS ->Rpd ->GND
I_GSSmax := 1*10^-6
V_thmin := 2
V_leak == I_GSSmax*R_pd
# Donde R_pd es la resistencia de pulldown, I_GSSmax es la corriente máxima de fuga en el gate y V_leak es el voltaje máximo de fuga aceptable por diseño definido por el 20% del mínimo voltaje de threshold para asegurar que no hayan falsas activaciones en el gate
V_leakmax := V_thmin*0.2 → 0.4
V_leak ≤ 0.1
R_pdmax := V_leakmax/I_GSSmax → 400000.0
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# R4 y R5 corresponden a las resistencias de pulldown en este esquema
R_pd ≤ 400*k
R_pd == 10*k  # ohm
# se escoge 10k por ser un valor estándar
# para simplificar la notación se define lo siguiente
# Resistencias Gate
Vcc := 12
# si es que el switch está cerrado
# Caso sin resistencia de gate
Vin(t) := Vcc
Vin == Vin(t)
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Vcgs == Vcgs(t)
# Por malla se obtiene
Vrg == Vrg(t)
Vin == Vcgs
icgs == C*d/dt(Vcgs)  # corriente del capacitor
# Debido a que el voltaje en Vin depende de Vcc, este se comporta como un escalón, provocando un pulso en la corriente  icgs
icgs == C*d/dt(Vcgs) == C*d/dt(Vin)
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# ->
d/dt(u)  # ->
# Caso con resistencia de gate
# Aplicando malla nuevamente y despejando la corriente del capacitor
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Vin == Vcgs + Vrg
Vcgs == Vin - Vrg  # corriente del capacitor
C*d/dt(Vcgs) == C*d/dt(Vin - Vrg)
icgs == C*d/dt(Vcgs)
icgs == C*d/dt(Vin - icgs*Rg)
# EDO
icgs == C*(d/dt(Vin - icgs*Rg))
icgs + C*(d/dt(icgs*Rg)) == C*(d/dt(Vin))
# Laplace | Eligiendo Rg
icgs(s) + C*(s*icgs(s)*Rg) == C*(s*Vin(s))
# se requiere limitar icgs, tomando la datasheet del Driver IR2184, este tiene un output máximo de 1.4A, por simplicidad y para tener margen al calcular la resistencia de gate se limitará icgs a 1.2 A
icgs(s)*(1 + C*s*Rg) == C*(s*Vin(s))
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icgs(s) == C*(s*Vin(s))/(1 + C*s*Rg)
Rg := Vcc/1.2 → 10.0  # Ω
# como Vin se comporta como un escalon de 0 a Vcc se tiene
icgs(s) == C*(s*Vcc)/(1 + C*s*Rg)*1/s == C*Vcc/(1 + C*s*Rg)
# capacitancia gate source
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icgs(s) := Vcc/Rg*(1/(1/RgC + s)) invlaplace → 1.2*e^(-1.0*t/RgC)  # ∴
icgs(t) := Vcc/Rg*e^(-t/(Rg*C))
# Si bien la capacitancia parasita está altamente exagerada, esto es para que el comportamiento de la corriente sea más notorio, a valores más reales de capacitancia la corriente tendrá un cambio más abrupto pero se evitara el impulso.
Cgs + Cgd == 1350*10^-12
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Cgd == 155*10^-12
Cds + Cgd == 330*10^-12
icgs(t) → 1.2*e^(-15746.4*t)
M := [0, 1, 1; 0, 0, 1; 1, 0, 1]
v := [1350*10^-12; 155*10^-12; 330*10^-12]
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lsolve(M, v) = [1.75e-10; 1.195e-9; 1.55e-10]
Cgs := 1.195*10^-9  # F
# Voltaje en el capacitor
icgs(t) == Vcc/Rg*e^(-t/(Rg*C))
icgs == C*d/dt(Vcgs)
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C*d/dt(Vcgs(t)) == Vcc/Rg*e^(-t/(Rg*C))
Vcgs(t) == 1/C*integral(Vcc/Rg*e^(-t/(Rg*C)), t = 0 .. t) == 12*(1 - e^(-t/(Rg*C)))
# Teoría de los MOSFETS y su elección
# Se toman en cuenta los Mosfet por sobre los transistores BJT. Los transistores BJT requieren aplicar corriente al Pin de base(gate en el caso de mosfet), perdiendo energía en el proceso. En cambio un MOSFET requiere voltaje en su pin Gate y casi no fluye corriente, proporcionando un circuito más eficiente y fácil de diseñar. Además los MOSFETs pueden manejar mucha más corriente.
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# El términal de Gate,por si solo, actúa como un condensador, almacenando carga. Si esta carga no tiene a donde ir, el MOSFET permanecerá activado.
# Cuando se cambia de apagado a encendido en la parte del GATE ocurre un pico de corriente, ya que los electrones entran rápidamente en este terminal(fracciones de segundos). Por esta razón se requiere colocar una resistencia entre el GATE y lo que sea que lo alimente, para poder disminuir la corriente( corriente IN-RUSH) que pueda dañar a la alimentación del GATE.
# Ahora, para descargar el Mosfet se requiere un camino a tierra, para esto se añade una resistencia en paralelo entre el GATE y tierra. Cuando se alimenta el GATE, una pequeña corriente fluye hacia la resistencia en paralelo(10kOhm), pero el pin de voltaje del Mosfet recibe el voltaje completo y cuando se des energiza los electrones pueden llegar adecuadamente a tierra.
# En nuestro caso el MOSFET que se ocupará  será de Enriquecimiento(canal N) normalmente apagado (GATE:ON, fluye corriente; GATE:OFF, no fluye corriente del DRAIN al SOURCE). La flecha del Mosfet indica como se manipula el semiconductor del MOSFET
# Para que el MOSFET este en un estado OFF el voltaje del SOURCE debe igualar o superar el voltaje del GATE, por otro lado el voltaje GATE debe ser mayor que el de SOURCE.
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# Para el caso del estado ON del MOSFET la zona entre el DRAIN
# y el SOURCE se disminuye la resistencia entre ellos, ENCENDIENDO EL MOSFET.
# El semiconductor está hecho de silicio, en su interior se encuentran átomos de silicio(poseen 4 electrones de valencia). En el caso de que un Mosfet está dopado de tipo N, es porque posee atomos de fosforo, que posee 5 electrones de valencia. Como en este caso se encuentra el equilibrio completando con 8 electrones, quedará un electron libre, teniendo una carga negativa.
# En el caso de enriquecimiento tipo N, se tiene una base de un material tipo p(carga positiva) y dos secciones tipo N que estarán conectadas al SOURCE y al DRAIN del mosfet y  se encuentra de la siguiente forma.
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# En este caso la parte del GATE estará entre el SOURCE y el DRAIN, en donde se ubicará el compuesto Dioxido de silicio, el cual posee una resistencia muy alta para separar completamente el pin de GATE del semiconductor, para que la corriente no pase a través de él.
# Metal Oxide Semiconductor Field Effect (MOSFET)
# En general, si aplicamos un voltaje del Mosfet del DRAIN a SOURCE, no fluirá corriente (Region de agotamiento está bloqueando el paso), en este caso solo el diodo del lado del DRAIN se activa.
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# Una vez que se aplica un voltaje a la compuerta GATE, se genera un campo electrico en la compuerta metalica, alcanzando al semiconductor de silicio y comportándose como un capacitor.
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# Los electrones de la capa tipo P se empiezan a acercar a la parte del GATE(+). Al no poder traspasar la placa hacia la parte positiva, se empiezan a acumular los electrones, generando un puente entre la parte del DRAIN y la del SOURCE.
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# Por esto mismo se requiere un voltaje lo suficientemente grande para poder atraer una cantidad significativa de electrones para que se genere ese puente y funcione de manera efectiva el MOSFET. El voltaje necesario para aplicar al pin de GATE para que se genere corriente entre el DRAIN y el SOURCE se llama VOLTAJE UMBRAL
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# A medida que aumentamos el voltaje en el GATE el puente se ensancha, al aumentar el voltaje de DRAIN a SOURCE, la resistencia DISMINUYE y la corriente aumenta linealmente (Region Ohmnica)
# Region OHMNICA
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# La región de agotamiento se hace mas fuerte en la zona del DRAIN, debido al diodo en polarización inversa, comenzando a estrechar el canal en un extremo, generándose un punto de ESTRANGULAMIENTO. Además, debido a la corriente que fluye por el canal, no se podrá cerrar completamente, es decir, la corriente no podrá aumentar más y generándose una zona de SATURACIÓN. Entonces, para aumentar la corriente se requerirá un aumento en el voltaje de GATE.
# PUNTO DE ESTRANGULAMIENTO
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# Driver
# Se emplea el IR2184 como driver half-bridge con canales alto (HO) y bajo (LO) para accionar los dos MOSFET del buck bidireccional. El canal alto es “flotante” y opera mediante bootstrap, por lo que es apto para conmutar un MOSFET high-side N-canal respecto a un nodo conmutado (VS). Se escoje el driver por su diseño especifico para convertidores sincronos. El dispositivo es inmune a dV/dt rápidos.
# El canal alto del IR2184 utiliza un circuito bootstrap, el cual consiste en un diodo rápido y un condensador conectados de forma que, cuando el MOSFET de bajo lado está encendido y el nodo conmutado está a tierra, el condensador se carga con el voltaje de alimentación del driver. Posteriormente, al querer activar el MOSFET de alto lado, el condensador proporciona un voltaje adicional que “eleva” la compuerta por encima del nodo conmutado, permitiendo su correcta conducción sin necesidad de una fuente de alimentación aislada. De esta manera, el bootstrap permite que el canal alto funcione de forma flotante y controle eficientemente al MOSFET superior del half-bridge, en caso de que falle tiene la proteccion UVL.
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# Calculo de vueltas del inductor
# En nuestro caso tenemos una inductancia de 1mH
N == sqrt(L/A_L)
# Análisis de potencia
# Pérdidas en forma de calor
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# Debido al "rise time" y "fall time" del MOSFET, existen pérdidas durante la conmutación
Vin_max := V_oBoost
I_L := i_LmaxAVG
t_rise := 75*10^-9
t_fall := 40*10^-9
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# Se toma el peor caso para la potencia disipada promedio
# Q1
VQ2ds == Vin
Pd_max1 == 1/2*I_L*Vin_max*t_rise*fc
IQ1ds == I_L
Pd_max2 == 1/2*I_L*Vin_max*t_fall*fc
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VQ1ds == Vin
# Q2
IQ2ds == 0
Pd_max1 := 1/2*I_L*Vin_max*(t_rise + t_fall)*fc → 0.0388125  # W
# Luego tomando el valor de la resitencia térmica se obtiene
R_th := 60
# esto quiere decir que en el peor de los casos los MOSFETs operarán 2.3 grados sobre la temperatura ambiente
Pd_max1 == ΔT/R_th
ΔT := Pd_max1*R_th → 2.32875
# Eficiencia
# MOSFETs
# Perdidas por conducción
HIGH - MOSFET
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# derivando desde la expresión de potencia
P == V*I == I^2*R
# luego buscamos el valor promedio de la corriente
P_HS_C == 1/T*integral(IQ1_ds(t)^2*Rds, t = t1 .. t2)
# t1 | t2
P_HS_C == 1/T*integral(IQ2_ds(t)^2*Rds, t = t1 .. t2) == 1/T*ILrms^2*DT*Rds == ILrms^2*D*Rds
# LS MOSFET
P_HS_C == 1/T*integral(IQ1_ds(t)^2*Rds, t = t1 .. t2) == 1/T*ILrms^2*(1 - D)*T*Rds == ILrms^2*(1 - D)*Rds
# Pérdidas por conmutación
# Reutilizando las expresiones de la sección anterior
P_HS_sw == 1/2*(Iout*Vin*(t_rise + t_fall))*fc
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# Para el low side mosfet, se calculan las pérdidas en el tiempo muerto
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P_LS_sw == 2*(Iout*Vdiodo*t_muerto)*fc
# se multiplica por dos debido a que hay dos tiempos muertos por ciclo
# Pérdidas Resistencias gate
# utilizando la expresión de energía para cargar el MOSFET se puede calcular la potencia disipada en ambas resistencias de gate
dW == vdq
W == integral(v, q = 0 .. Qg) == V_dr*Qg
Prg == 2*Qg*Vgs*fc
# Resistencias de pull down
# Al igual que las pérdidas por conducción esta puede ser calculada por
P_Rpd == 1/T*integral(Vgs(t)^2/R_pd, t = t1 .. t2) == D*Vgs^2/R_pd
P_Rpd == 1/T*integral(Vgs(t)^2/R_pd, t = t1 .. t2) == (1 - D)*Vgs^2/R_pd
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# t1 | t2
# resistencia de inductor
N := 15
MLT := (26 + 14.4)/2*10^-3*π
D_conductor := 0.912*10^-3
l := N*MLT → 0.951902574038
ρ_cu := 1.72*10^-8
A := π*(D_conductor/2)^2 → 0.653250210017*10^-6
P_L == I_Lrms^2*R_20c
R_20c == ρ_cu*l/A → R_20c == 0.0250634810711
# resistencia de Capacitores
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P_c == I_Crms^2*ESR
ESR == tan(δ)/(2*π*f*C)
tan(δ) == R/X_C == R/(1/wC)
# Eficiencia resultante para modo buck(cálculos en python)
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# Valores Para los divisores de voltaje a raíz del ESP32
# MODO BUCK | MODO BOOST
V_oBuck := 14 V
V_oBoost := 27 V
V_ESP32 := 2.45 V
V_ESP32 := 2.45 V
R_2in := 10 kΩ
R_2in := 10 kΩ
# 5.7 : 1 | 11 :1
R_1Buck := R_2in*(V_oBuck/V_ESP32 - 1) = 47142.9 Ω
R_1Boost := R_2in*(V_oBoost/V_ESP32 - 1) = 100204 Ω
R_1Buck := 47 kΩ
R_1Boost := 100 kΩ
# POTENCIA DISIPADA EN LAS CARGAS
P_BUCK := V_oBuck^[2]/(R_2in + R_1Buck) = [0.0034386] W
P_BOOST := V_oBoost^[2]/(R_2in + R_1Boost) = [0.00662727] W
# POTENCIA ENTREGADA AL PIN DEL ESP32
I_IH := 50 nA
P_InESP32 := V_ESP32*I_IH = 1.225e-7 W
122.5 nW
# V
V_Sensibilidad := 3.3 V/4096 = 0.000805664 V
0.8*mV
