# Buck Bidireccional
# Especificaciones:
# Buck:
# Vin_min = 23 V
# Vo_max = 14 V
# Boost:
# Vin_min = 12 V
# Vo_max = 27 V
# Fc = 60 KHz
# P_max = 5 W
# Buck cases
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# ON
# Vin  = V_L + Vo  -> V_L  = Vin - Vo
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# OFF | V_L = -Vo
# Boost cases
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# ON
# V_L =  Vin
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# OFF | V_L  = Vin - Vo
# Operación en modo continuo
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A
Δi_L(T) == 0
# 0 | T | t
V_L == L*d/dt(i_L)
Δi_L == 1/L*integral(V_L, t = 0 .. T) == 0
1/L*(integral(V_L, t = 0 .. t_on) + integral(V_L, t = t_on .. T)) == 1/L*(V_L*t_on + V_L*t_off) == 0
# Duty
# Buck
V_inbuck := 23.0
(V_L*t_on + V_L*t_off) == 0
V_obuck := 14.0
(V_in - V_o)*D*P - V_o*(1 - D)*P == 0 solve, V_o → V_in*D
V_o == V_in*D
D_buck := V_obuck/V_inbuck → 0.608695652174
# Boost
(V_L*t_on + V_L*t_off) == 0
V_inboost := 12.0
V_in*D*P + (V_in - V_o)*(1 - D)*P == 0 solve, D → (V_o - V_in)/V_o
V_oboost := 27.0
V_o == V_in/(1 - D)
D_boost := (V_oboost - V_inboost)/V_oboost → 0.555555555556
P_max := 5
# Inductor
frec := 60000
V_L == L*d/dt(i_L)
L == V_L*t_on/Δi_L
# Buck
I_Lmaxbuck := P_max/V_obuck → 0.357142857143
Δi_Lbuck := 0.3*I_Lmaxbuck → 0.107142857143
L := (V_inbuck - V_obuck)*D_buck/(Δi_Lbuck*frec) → 0.000852173913043
I_pk := I_Lmax + Δi_Lbuck/2 → I_Lmax + 0.0535714285714
# Boost
I_Lmaxboost := P_max/V_inboost → 0.416666666667
Δi_Lboost := 0.3*I_Lmaxboost → 0.125
L := V_inboost*D_boost/(Δi_Lboost*frec) → 0.000888888888889
Inductor > 888 μH
